*Heading
** Job name: Asymmteric-three-point-bending Model name: Model-1
** Generated by: Abaqus/CAE 6.14-1
*Preprint, echo=NO, model=NO, history=NO, contact=NO
**
** PARTS
**
*Part, name=Aysmmetric-notched-plate
*Node
      1, 0.00694000022, 0.00173899997
      2, 0.00694000022,           0.
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*Element, type=CPS4R
  1,    1,   24,  710,  167
  2,   24,   25,  711,  710
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*Nset, nset=Plate, generate
    1,  4156,     1
*Elset, elset=Plate, generate
    1,  3988,     1
*Nset, nset=Top-actuation-region
  495,  496,  497,  498, 2868, 2869
*Elset, elset=Cracked-elements, generate
 716,  791,   25
** Section: Section-1
*Solid Section, elset=Plate, material=Test
,
*End Part
**
**
** ASSEMBLY
**
*Assembly, name=Assembly
**
*Instance, name=Aysmmetric-notched-plate-1, part=Aysmmetric-notched-plate
*End Instance
**
*Nset, nset=Left-pin-region, instance=Aysmmetric-notched-plate-1
  203,  204,  205, 1409
*Nset, nset=Right-pin-region, instance=Aysmmetric-notched-plate-1
   90,   91,   92, 1189
*End Assembly
**
** MATERIALS
**
*Material, name=Test
*Density
1.,
*Elastic
1.,0.
** ----------------------------------------------------------------
**
** STEP: Step-1
**
*Step, name=Step-1, nlgeom=NO
*Dynamic, Explicit
, 1.
*Bulk Viscosity
0.06, 1.2
**
** BOUNDARY CONDITIONS
**
** Name: Actuation Type: Velocity/Angular velocity
*Boundary, type=VELOCITY
Aysmmetric-notched-plate-1.Top-actuation-region, 2, 2, -0.0001
** Name: Left-pin Type: Displacement/Rotation
*Boundary
Left-pin-region, 1, 1
Left-pin-region, 2, 2
** Name: Right-pin Type: Displacement/Rotation
*Boundary
Right-pin-region, 1, 1
Right-pin-region, 2, 2
**
** OUTPUT REQUESTS
**
*Restart, write, number interval=1, time marks=NO
**
** FIELD OUTPUT: F-Output-1
**
*Output, field, variable=PRESELECT
**
** HISTORY OUTPUT: H-Output-1
**
*Output, history, variable=PRESELECT
*End Step
