*Heading
** Job name: SENT-specimen-1 Model name: Model-1
** Generated by: Abaqus/CAE 6.14-1
*Preprint, echo=NO, model=NO, history=NO, contact=NO
**
** PARTS
**
*Part, name=SENT
*Node
      1,           0.,           0.
      2, 0.00139999995,           0.
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*Element, type=CPS4R
   1,    1,    2,   13,   12
   2,    2,    3,   14,   13
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*Nset, nset=Set-1, generate
    1,  1122,     1
*Elset, elset=Set-1, generate
    1,  1010,     1
*Elset, elset=Cracked, generate
 507,  510,    1
** Section: Section-1
*Solid Section, elset=Set-1, material="SENT specimen material"
,
*End Part
**
**
** ASSEMBLY
**
*Assembly, name=Assembly
**
*Instance, name=SENT-1, part=SENT
*End Instance
**
*Nset, nset=Bottom, instance=SENT-1, generate
  1,  11,   1
*Elset, elset=Bottom, instance=SENT-1, generate
  1,  10,   1
*Nset, nset=Top, instance=SENT-1, generate
 1112,  1122,     1
*Elset, elset=Top, instance=SENT-1, generate
 1001,  1010,     1
*End Assembly
**
** MATERIALS
**
*Material, name="SENT specimen material"
*Density
7860.,
*Elastic
 2.07e+11, 0.3
** ----------------------------------------------------------------
**
** STEP: Step-1
**
*Step, name=Step-1, nlgeom=YES
*Dynamic, Explicit
, 1.
*Bulk Viscosity
0.06, 1.2
**
** BOUNDARY CONDITIONS
**
** Name: Bottom BC Type: Velocity/Angular velocity
*Boundary, type=VELOCITY
Bottom, 2, 2, -0.0005
** Name: Top BC Type: Velocity/Angular velocity
*Boundary, type=VELOCITY
Top, 2, 2, 0.0005
**
** OUTPUT REQUESTS
**
*Restart, write, number interval=1, time marks=NO
**
** FIELD OUTPUT: F-Output-1
**
*Output, field, variable=PRESELECT
**
** HISTORY OUTPUT: H-Output-1
**
*Output, history, variable=PRESELECT
*End Step
