*Heading
** Job name: Stretching-bar Model name: Model-1
** Generated by: Abaqus/CAE 6.14-1
*Preprint, echo=NO, model=NO, history=NO, contact=NO
**
** PARTS
**
*Part, name=Rectangle
*Node
      1,           0.,           0.
      2,  0.211225703,  0.121951222
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*Element, type=CPS4R
  1,   1,   2,  44,  43
  2,   2,   3,  45,  44
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*Nset, nset=Set-1, generate
   1,  210,    1
*Elset, elset=Set-1, generate
   1,  164,    1
** Section: Rectangle section
*Solid Section, elset=Set-1, material=Test
,
*End Part
**
**
** ASSEMBLY
**
*Assembly, name=Assembly
**
*Instance, name=Rectangle-1, part=Rectangle
*End Instance
**
*Nset, nset=Left, instance=Rectangle-1, generate
   1,  169,   42
*Elset, elset=Left, instance=Rectangle-1, generate
   1,  124,   41
*Nset, nset=Right, instance=Rectangle-1, generate
  42,  210,   42
*Elset, elset=Right, instance=Rectangle-1, generate
  41,  164,   41
*End Assembly
**
** MATERIALS
**
*Material, name=Test
*Density
1.,
*Elastic
1.,0.
** ----------------------------------------------------------------
**
** STEP: Step-1
**
*Step, name=Step-1, nlgeom=NO
*Dynamic, Explicit
, 10.
*Bulk Viscosity
0.06, 1.2
**
** BOUNDARY CONDITIONS
**
** Name: Left BC Type: Displacement/Rotation
*Boundary
Left, 1, 1
Left, 2, 2
** Name: Right BC Type: Velocity/Angular velocity
*Boundary, type=VELOCITY
Right, 1, 1, 0.00866025
Right, 2, 2, 0.005
**
** OUTPUT REQUESTS
**
*Restart, write, number interval=1, time marks=NO
**
** FIELD OUTPUT: F-Output-1
**
*Output, field, variable=PRESELECT
**
** HISTORY OUTPUT: H-Output-1
**
*Output, history, variable=PRESELECT, frequency=1
*End Step
