*Heading
** Job name: Three-point-bending Model name: Model-1
** Generated by: Abaqus/CAE 6.14-1
*Preprint, echo=NO, model=NO, history=NO, contact=NO
**
** PARTS
**
*Part, name=Plate-bending
*Node
      1,           4.,           2.
      2,           4.,  0.400000006
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*Element, type=CPS4R
  1,   1,   9, 222, 123
  2,   9,  10, 223, 222
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*Nset, nset="Plate section", generate
    1,  1684,     1
*Elset, elset="Plate section", generate
    1,  1580,     1
*Nset, nset=Left-corner-region
    7,  179,  180,  181,  182, 1684
*Nset, nset=Right-corner-region
   4,  64,  65,  66,  67, 962
*Nset, nset=Top-action-region
   1,   9, 123, 124
** Section: Section-1
*Solid Section, elset="Plate section", material=Test
,
*End Part
**
**
** ASSEMBLY
**
*Assembly, name=Assembly
**
*Instance, name=Plate-bending-1, part=Plate-bending
*End Instance
**
*End Assembly
*Amplitude, name=Amp-1
             0.,              0.,              1.,              1.
**
** MATERIALS
**
*Material, name=Test
*Density
1.,
*Elastic
1.,0.
** ----------------------------------------------------------------
**
** STEP: Step-1
**
*Step, name=Step-1, nlgeom=NO
*Dynamic, Explicit
, 1.
*Bulk Viscosity
0.06, 1.2
**
** BOUNDARY CONDITIONS
**
** Name: Left-corner-bc Type: Displacement/Rotation
*Boundary
Plate-bending-1.Left-corner-region, 1, 1
Plate-bending-1.Left-corner-region, 2, 2
** Name: Right-corner-bc Type: Displacement/Rotation
*Boundary
Plate-bending-1.Right-corner-region, 1, 1
Plate-bending-1.Right-corner-region, 2, 2
** Name: Top-bc Type: Displacement/Rotation
*Boundary, amplitude=Amp-1
Plate-bending-1.Top-action-region, 2, 2, -0.01
**
** OUTPUT REQUESTS
**
*Restart, write, number interval=1, time marks=NO
**
** FIELD OUTPUT: F-Output-1
**
*Output, field, variable=PRESELECT
**
** HISTORY OUTPUT: H-Output-1
**
*Output, history, variable=PRESELECT
*End Step
