*Heading
** Job name: Asymm-XFEM Model name: Model-1
** Generated by: Abaqus/CAE 6.14-1
*Preprint, echo=NO, model=NO, history=NO, contact=NO
**
** PARTS
**
*Part, name=Assymetric-plate
*End Part
**
**
** ASSEMBLY
**
*Assembly, name=Assembly
**
*Instance, name=Assymetric-plate-1, part=Assymetric-plate
*Node
      1,           1.,           0.
      2,           1.,        2.375
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*Element, type=CPS4R
  1,    1,   97, 2581,  198
  2,   97,   98, 2582, 2581
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*Nset, nset=Refinement-region
    3,    4,    6,    8,   10,   24
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*Elset, elset=Refinement-region
   193,   194,   195,   196,   197,   198
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*Nset, nset=Plate-section, generate
     1,  19205,      1
*Elset, elset=Plate-section, generate
     1,  18851,      1
** Section: Section-1
*Solid Section, elset=Plate-section, material=Test
,
*End Instance
**
*Nset, nset=Right, instance=Assymetric-plate-1
 31,
*Nset, nset=Set-5, instance=Assymetric-plate-1
   46,   47, 1060, 1061, 1062, 1063
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*Elset, elset=Set-5, instance=Assymetric-plate-1
  4972,  4973,  4974,  4975,  4976,  4977
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*Nset, nset=Set-10, instance=Assymetric-plate-1
 1,
*Nset, nset=Set-12, instance=Assymetric-plate-1
 42,
*Nset, nset=_PickedSet38, internal, instance=Assymetric-plate-1
    34,    35,    37,    39,    41,    45
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*Elset, elset=_PickedSet38, internal, instance=Assymetric-plate-1
  4972,  4973,  4974,  4975,  4976,  4977
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*Nset, nset=_PickedSet39, internal, instance=Assymetric-plate-1
   46,   47, 1060, 1061, 1062, 1063
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*Elset, elset=_PickedSet39, internal, instance=Assymetric-plate-1
  4972,  4973,  4974,  4975,  4976,  4977
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*Enrichment, name=Crack-1, type=PROPAGATION CRACK, elset=_PickedSet38
*End Assembly
**
** MATERIALS
**
*Material, name=Test
*Damage Initiation, criterion=MAXPE
 2e-07,
*Damage Evolution, type=DISPLACEMENT
 2e-07,
*Elastic
1.,0.
*Initial Conditions, type=ENRICHMENT
Assymetric-plate-1.4991, 1,Crack-1, 1e-06, -0.05
Assymetric-plate-1.4991, 2,Crack-1, 1e-06, 0.
Assymetric-plate-1.4991, 3,Crack-1, -0.05, -0.000520826
Assymetric-plate-1.4991, 4,Crack-1, -0.05, -0.0504948
Assymetric-plate-1.4990, 1,Crack-1, 1e-06
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Assymetric-plate-1.4972, 4,Crack-1, -0.05
** ----------------------------------------------------------------
**
** STEP: Step-1
**
*Step, name=Step-1, nlgeom=NO
*Static
100., 100., 0.001, 100.
**
** BOUNDARY CONDITIONS
**
** Name: Left Type: Displacement/Rotation
*Boundary
Set-10, 1, 1
Set-10, 2, 2
** Name: Right Type: Displacement/Rotation
*Boundary
Right, 2, 2
** Name: Top Type: Velocity/Angular velocity
*Boundary, type=VELOCITY
Set-12, 2, 2, -0.0001
**
** OUTPUT REQUESTS
**
*Restart, write, number interval=1, time marks=NO
**
** FIELD OUTPUT: F-Output-1
**
*Output, field, variable=PRESELECT, number interval=20, time marks=NO
**
** HISTORY OUTPUT: H-Output-1
**
*Output, history, variable=PRESELECT, number interval=200, time marks=NO
*End Step
