*Heading
** Job name: Asymm-bending-refined-2 Model name: Model-1
** Generated by: Abaqus/CAE 6.14-1
*Preprint, echo=NO, model=NO, history=NO, contact=NO
**
** PARTS
**
*Part, name=Assymetric-plate
*Node
      1,        6.375,        2.375
      2,   6.17677689,   2.57322335
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*Element, type=CPS4R
 1,    1,   56, 1721,   73
 2,   56,   57, 1722, 1721
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*Nset, nset=Plate-section, generate
     1,  14061,      1
*Elset, elset=Plate-section, generate
     1,  13776,      1
*Nset, nset=Refinement-region
    1,    2,    4,    5,    6,    7
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*Elset, elset=Refinement-region
     1,     2,     3,     4,     7,    10
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*Nset, nset=Crack-region-refinement
    1,    4,    5,    6,    7,    8
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*Elset, elset=Crack-region-refinement
    25,    26,    27,    28,    29,    30
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** Section: Section-1
*Solid Section, elset=Plate-section, material=Test
,
*End Part
**
**
** ASSEMBLY
**
*Assembly, name=Assembly
**
*Instance, name=Assymetric-plate-1, part=Assymetric-plate
*End Instance
**
*Nset, nset=Actuation, instance=Assymetric-plate-1
 1022, 1023, 1024, 9654
*Elset, elset="Cracked Elements", instance=Assymetric-plate-1, generate
 5453,  5472,     1
*Nset, nset=Left-pin-region, instance=Assymetric-plate-1
  239,  240,  241, 2717
*Nset, nset=Right-pin-region, instance=Assymetric-plate-1
  440,  441,  442, 5822
*End Assembly
**
** MATERIALS
**
*Material, name=Test
*Density
1.,
*Elastic
1.,0.
** ----------------------------------------------------------------
**
** STEP: Step-1
**
*Step, name=Step-1, nlgeom=NO
*Dynamic, Explicit
, 1.
*Bulk Viscosity
0.06, 1.2
**
** BOUNDARY CONDITIONS
**
** Name: Actuation Type: Velocity/Angular velocity
*Boundary, type=VELOCITY
Actuation, 2, 2, -0.0001
** Name: Left-pin Type: Displacement/Rotation
*Boundary
Left-pin-region, 1, 1
Left-pin-region, 2, 2
** Name: Right-pin Type: Displacement/Rotation
*Boundary
Right-pin-region, 2, 2
**
** OUTPUT REQUESTS
**
*Restart, write, number interval=1, time marks=NO
**
** FIELD OUTPUT: F-Output-1
**
*Output, field, variable=PRESELECT
**
** HISTORY OUTPUT: H-Output-1
**
*Output, history, variable=PRESELECT
*End Step
