*Heading
** Job name: plate_with_a_hole_shear Model name: Model-1
** Generated by: Abaqus/CAE 6.14-1
*Preprint, echo=NO, model=NO, history=NO, contact=NO
**
** PARTS
**
*Part, name="Plate with a hole"
*Node
      1,  0.150000006,  0.400000006
      2,           0.,  0.400000006
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*Element, type=CPE4R
  1,   1,  22, 493, 103
  2,  22,  23, 494, 493
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*Nset, nset=Plate-hole, generate
    1,  2582,     1
*Elset, elset=Plate-hole, generate
    1,  2448,     1
** Section: Section-1
*Solid Section, elset=Plate-hole, controls=EC-1, material=Test
,
*End Part
**
**
** ASSEMBLY
**
*Assembly, name=Assembly
**
*Instance, name="Plate with a hole-1", part="Plate with a hole"
*End Instance
**
*Nset, nset=Bottom, instance="Plate with a hole-1"
   3,   4,   9,  16,  63,  64
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*Elset, elset=Bottom, instance="Plate with a hole-1"
  298,  299,  300,  301,  302,  303
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*Nset, nset=Top, instance="Plate with a hole-1"
  14,  15,  19,  21, 278, 279
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*Elset, elset=Top, instance="Plate with a hole-1"
 1000, 1034, 1068, 1102, 1136, 1170
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*End Assembly
**
** ELEMENT CONTROLS
**
*Section Controls, name=EC-1
1., 1., 1., 0., 0.
**
** MATERIALS
**
*Material, name=Test
*Density
1.,
*Elastic
1., 0.3
** ----------------------------------------------------------------
**
** STEP: Step-1
**
*Step, name=Step-1, nlgeom=NO
*Dynamic, Explicit
, 10.
*Bulk Viscosity
0., 0.
**
** BOUNDARY CONDITIONS
**
** Name: Velocity Top Type: Velocity/Angular velocity
*Boundary, type=VELOCITY
Top, 1, 1, 0.01
Top, 2, 2, 0.01
** Name: Velocity bottom Type: Velocity/Angular velocity
*Boundary, type=VELOCITY
Bottom, 1, 1, -0.01
Bottom, 2, 2, -0.01
**
** OUTPUT REQUESTS
**
*Restart, write, number interval=1, time marks=NO
**
** FIELD OUTPUT: F-Output-1
**
*Output, field, variable=PRESELECT
**
** HISTORY OUTPUT: H-Output-1
**
*Output, history, variable=PRESELECT
*End Step
