*Heading
** Job name: three-point-bending Model name: Model-1
** Generated by: Abaqus/CAE 6.14-1
*Preprint, echo=NO, model=NO, history=NO, contact=NO
**
** PARTS
**
*Part, name=Plate
*Node
      1,           0.,           0.
      2, 0.0987654328,           0.
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*Element, type=CPS4R
   1,    1,    2,   84,   83
   2,    2,    3,   85,   84
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*Nset, nset=Set-1, generate
    1,  2050,     1
*Elset, elset=Set-1, generate
    1,  1944,     1
*Elset, elset=Crack, generate
  41,  365,   81
*Nset, nset=Top
 1927, 1928, 2008, 2009, 2010, 2011
*Nset, nset=Right
  80,  81,  82, 163, 164, 246
*Nset, nset=Left
   1,   2,   3,  83,  84, 165
** Section: Section-1
*Solid Section, elset=Set-1, material=Test
,
*End Part
**
**
** ASSEMBLY
**
*Assembly, name=Assembly
**
*Instance, name=Plate-1, part=Plate
*End Instance
**
*End Assembly
**
** MATERIALS
**
*Material, name=Test
*Density
1.,
*Elastic
1.,0.
** ----------------------------------------------------------------
**
** STEP: Step-1
**
*Step, name=Step-1, nlgeom=YES
*Dynamic, Explicit
, 1.
*Bulk Viscosity
0., 0.
**
** OUTPUT REQUESTS
**
*Restart, write, number interval=1, time marks=NO
**
** FIELD OUTPUT: F-Output-1
**
*Output, field, variable=PRESELECT
**
** HISTORY OUTPUT: H-Output-1
**
*Output, history, variable=PRESELECT
*End Step
