*Heading
** Job name: Matrix-cracking-density Model name: Model-1
** Generated by: Abaqus/CAE 6.14-1
*Preprint, echo=NO, model=NO, history=NO, contact=NO
**
** PARTS
**
*Part, name=Lamina
*Node
      1,           0.,           0.
      2,  0.300000012,           0.
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*Element, type=CPS4R
  1,   1,   2, 103, 102
  2,   2,   3, 104, 103
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*Nset, nset=Laminate, generate
   1,  202,    1
*Elset, elset=Laminate, generate
   1,  100,    1
** Section: Section-1
*Solid Section, elset=Laminate, material=Test
,
*End Part
**
**
** ASSEMBLY
**
*Assembly, name=Assembly
**
*Instance, name=Lamina-1, part=Lamina
*End Instance
**
*Nset, nset=Bottom, instance=Lamina-1, generate
   1,  101,    1
*Elset, elset=Bottom, instance=Lamina-1, generate
   1,  100,    1
*Nset, nset=Left, instance=Lamina-1
   1, 102
*Elset, elset=Left, instance=Lamina-1
 1,
*Nset, nset=Right, instance=Lamina-1
 101, 202
*Elset, elset=Right, instance=Lamina-1
 100,
*End Assembly
**
** MATERIALS
**
*Material, name=Test
*Density
1.,
*Elastic
1.,0.
** ----------------------------------------------------------------
**
** STEP: Step-1
**
*Step, name=Step-1, nlgeom=NO
*Dynamic, Explicit
, 1.
*Bulk Viscosity
0., 0.
**
** BOUNDARY CONDITIONS
**
** Name: Bottom roller Type: Displacement/Rotation
*Boundary
Bottom, 2, 2
** Name: Left Roller Type: Displacement/Rotation
*Boundary
Left, 1, 1
** Name: Right roller Type: Velocity/Angular velocity
*Boundary, type=VELOCITY
Right, 1, 1, 0.0001
**
** OUTPUT REQUESTS
**
*Restart, write, number interval=1, time marks=NO
**
** FIELD OUTPUT: F-Output-1
**
*Output, field, variable=PRESELECT
**
** HISTORY OUTPUT: H-Output-1
**
*Output, history, variable=PRESELECT
*End Step
