*Heading
** Job name: doublecant-single-node Model name: Model-1
** Generated by: Abaqus/CAE 6.14-1
*Preprint, echo=NO, model=NO, history=NO, contact=NO
**
** PARTS
**
*Part, name=Part-1
*Node
      1,           1., 0.0489999987
      2,  0.300000012, 0.0489999987
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*Element, type=CPS4R
  1,   1,  13, 217,  84
  2,  13,  14, 218, 217
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*Nset, nset=Set-1, generate
   1,  408,    1
*Elset, elset=Set-1, generate
   1,  350,    1
*Nset, nset=Remove
   2,   5,   9,  11, 157, 158
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*Elset, elset=Remove, generate
 336,  350,    1
** Section: Section-1
*Solid Section, elset=Set-1, material=Material-1
,
*End Part
**
**
** ASSEMBLY
**
*Assembly, name=Assembly
**
*Instance, name=Part-1-1, part=Part-1
*End Instance
**
*Nset, nset=Cohesive, instance=Part-1-1
   1,   2,   5,   6,  13,  14
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*Elset, elset=Cohesive, instance=Part-1-1, generate
 211,  245,    1
*Nset, nset=Left-bottom, instance=Part-1-1
 10,
*Nset, nset=Left-top, instance=Part-1-1
 12,
*Nset, nset=Remove, instance=Part-1-1
   2,   5,   9,  11, 157, 158
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*Elset, elset=Remove, instance=Part-1-1, generate
 336,  350,    1
*Nset, nset=Right-fixed, instance=Part-1-1
   1,   4,   6,   7,  83,  84, 119, 120
*Elset, elset=Right-fixed, instance=Part-1-1
   1,  36,  71, 140, 175, 210
*End Assembly
**
** MATERIALS
**
*Material, name=Material-1
*Density
1.,
*Elastic
1.,0.
** ----------------------------------------------------------------
**
** STEP: Step-1
**
*Step, name=Step-1, nlgeom=YES
*Dynamic, Explicit
, 1.
*Bulk Viscosity
0.06, 1.2
**
** BOUNDARY CONDITIONS
**
** Name: BC-1 Type: Displacement/Rotation
*Boundary
Right-fixed, 1, 1
Right-fixed, 2, 2
** Name: BC-2 Type: Velocity/Angular velocity
*Boundary, type=VELOCITY
Left-top, 2, 2, 0.001
** Name: BC-3 Type: Velocity/Angular velocity
*Boundary, type=VELOCITY
Left-bottom, 2, 2, -0.001
**
** OUTPUT REQUESTS
**
*Restart, write, number interval=1, time marks=NO
**
** FIELD OUTPUT: F-Output-1
**
*Output, field, variable=PRESELECT
**
** HISTORY OUTPUT: H-Output-1
**
*Output, history, variable=PRESELECT
*End Step
