*Heading
** Job name: j-benchmark-crack-model Model name: Model-1
** Generated by: Abaqus/CAE 6.14-1
*Preprint, echo=NO, model=NO, history=NO, contact=NO
**
** PARTS
**
*Part, name=Plate
*End Part
**
**
** ASSEMBLY
**
*Assembly, name=Assembly
**
*Instance, name=SENT-1, part=Plate
*Node
      1,  0.400000006,           0.
      2,  0.400000006,  0.975610018
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*Element, type=CPS4R
  1,   1,  13, 187,  64
  2,  13,  14, 188, 187
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*Element, type=CPS3
161,   5, 904,  32
162,  32,   2,   5
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*Nset, nset=Set-1, generate
   1,  911,    1
*Elset, elset=Set-1, generate
   1,  856,    1
** Section: Section-1
*Solid Section, elset=Set-1, material=Test
,
*End Instance
**
*Nset, nset=Bottom, instance=SENT-1
   1,   4,  10,  58,  59,  60
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*Elset, elset=Bottom, instance=SENT-1
   1,  21,  41,  61,  81, 101
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*Nset, nset=Roller, instance=SENT-1
   3,   4,   6,   8,  12,  39
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*Elset, elset=Roller, instance=SENT-1
 141, 142, 143, 144, 145, 146
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*Nset, nset=Set-4, instance=SENT-1
   5,   6,  65,  66,  67,  68
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*Elset, elset=Set-4, instance=SENT-1
 161, 163, 165, 167, 169, 171, 173, 175, 178, 180, 182, 184, 186, 188, 190, 192
*Nset, nset=Top, instance=SENT-1
   9,  11,  12, 150, 151, 152
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*Elset, elset=Top, instance=SENT-1
 193, 235, 277, 319, 361, 403
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*Nset, nset=_PickedSet14, internal, instance=SENT-1
   5,   6,  65,  66,  67,  68
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*Elset, elset=_PickedSet14, internal, instance=SENT-1
 161, 163, 165, 167, 169, 171, 173, 175, 178, 180, 182, 184, 186, 188, 190, 192
*Nset, nset=_PickedSet15, internal, instance=SENT-1
 5,
*End Assembly
**
** MATERIALS
**
*Material, name="SENT specimen material"
*Density
7860.,
*Elastic
 2.07e+11, 0.3
*Material, name=Test
*Density
1.,
*Elastic
1.,0.
** ----------------------------------------------------------------
**
** STEP: Step-1
**
*Step, name=Step-1, nlgeom=YES
*Dynamic, Explicit
, 10.
*Bulk Viscosity
0.06, 1.2
**
** BOUNDARY CONDITIONS
**
** Name: Bottom BC Type: Displacement/Rotation
*Boundary
Bottom, 1, 1
Bottom, 2, 2
** Name: Left BC Type: Displacement/Rotation
*Boundary
Roller, 1, 1
** Name: Top BC Type: Velocity/Angular velocity
*Boundary, type=VELOCITY
Top, 2, 2, 0.0001
**
** OUTPUT REQUESTS
**
*Restart, write, number interval=1, time marks=NO
**
** FIELD OUTPUT: F-Output-1
**
*Output, field, variable=PRESELECT
**
** HISTORY OUTPUT: H-Output-1
**
*Output, history, variable=PRESELECT
*End Step
