*Heading
** Job name: j-benchmark-implicit-angle Model name: Model-1
** Generated by: Abaqus/CAE 6.14-1
*Preprint, echo=NO, model=NO, history=NO, contact=NO
**
** PARTS
**
*Part, name=Plate
*End Part
**
**
** ASSEMBLY
**
*Assembly, name=Assembly
**
*Instance, name=SENT-1, part=Plate
*Node
      1,  0.366025418,   1.36602545
      2, -0.133974597,    2.2320509
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*Element, type=CPS4R
  1,   1,   8, 140,  75
  2,   8,   9, 141, 140
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*Nset, nset=Set-1, generate
   1,  869,    1
*Elset, elset=Set-1, generate
   1,  800,    1
** Section: Section-1
*Solid Section, elset=Set-1, material=Test
,
*End Instance
**
*Nset, nset=Bottom, instance=SENT-1
   6,   7, 102, 103, 104, 105
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*Elset, elset=Bottom, instance=SENT-1, generate
 781,  800,    1
*Nset, nset=Crack-seam, instance=SENT-1
   4,   5,  76,  77,  78,  79
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*Elset, elset=Crack-seam, instance=SENT-1
 241, 261, 281, 301, 321, 341, 361, 381, 413, 414, 415, 416, 417, 418, 419, 420
*Nset, nset=Roller, instance=SENT-1
   3,   5,   6,  46,  47,  48
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*Elset, elset=Roller, instance=SENT-1
 381, 382, 383, 384, 385, 386
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*Nset, nset=Top, instance=SENT-1
  2,  3, 27, 28, 29, 30
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*Elset, elset=Top, instance=SENT-1, generate
  20,  400,   20
*Nset, nset=_PickedSet12, internal, instance=SENT-1
   4,   5,  76,  77,  78,  79
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*Elset, elset=_PickedSet12, internal, instance=SENT-1
 241, 261, 281, 301, 321, 341, 361, 381, 413, 414, 415, 416, 417, 418, 419, 420
*Nset, nset=_PickedSet13, internal, instance=SENT-1
 4,
*Nset, nset=_T-Rotated-csys, internal
Bottom,
Roller,
Top,
*Transform, nset=_T-Rotated-csys
0.866025403784439,          0.5,           0.,         -0.5, 0.866025403784439,           0.
*End Assembly
*Amplitude, name=Amp-1
             0.,              0.,             0.5,             0.5,              1.,              1.
**
** MATERIALS
**
*Material, name="SENT specimen material"
*Density
7860.,
*Elastic
 2.07e+11, 0.3
*Material, name=Test
*Density
1.,
*Elastic
1.,0.
** ----------------------------------------------------------------
**
** STEP: Step-1
**
*Step, name=Step-1, nlgeom=NO
*Dynamic,direct
0.2,10.,
**
** BOUNDARY CONDITIONS
**
** Name: Bottom BC Type: Displacement/Rotation
*Boundary
Bottom, 1, 1
Bottom, 2, 2
** Name: Left Type: Symmetry/Antisymmetry/Encastre
*Boundary
Roller, XSYMM
** Name: Top BC Type: Velocity/Angular velocity
*Boundary, type=VELOCITY
Top, 2, 2, 0.0001
**
** OUTPUT REQUESTS
**
*Restart, write, number interval=1, time marks=NO
**
** FIELD OUTPUT: F-Output-1
**
*Output, field, variable=PRESELECT, number interval=20, time marks=NO
**
** HISTORY OUTPUT: H-Output-1
**
*Output, history, variable=PRESELECT, number interval=200, time marks=NO
**
** HISTORY OUTPUT: H-Output-2
**
*Contour Integral, crack name=H-Output-2_Crack-1, contours=3, crack tip nodes
_PickedSet12, _PickedSet13, 0.866025, 0.5, 0.
*End Step
