*Heading
** Job name: j-benchmark Model name: Model-1
** Generated by: Abaqus/CAE 6.14-1
*Preprint, echo=NO, model=NO, history=NO, contact=NO
**
** PARTS
**
*Part, name=Plate
*Node
      1,           0.,           0.
      2, 0.0500000007,           0.
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*Element, type=CPS4R
  1,   1,   2,  23,  22
  2,   2,   3,  24,  23
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*Nset, nset=Set-1, generate
   1,  882,    1
*Elset, elset=Set-1, generate
   1,  820,    1
*Elset, elset=Cracked, generate
 401,  408,    1
** Section: Section-1
*Solid Section, elset=Set-1, material=Test
,
*End Part
**
**
** ASSEMBLY
**
*Assembly, name=Assembly
**
*Instance, name=SENT-1, part=Plate
*End Instance
**
*Nset, nset=Bottom, instance=SENT-1, generate
  1,  21,   1
*Elset, elset=Bottom, instance=SENT-1, generate
  1,  20,   1
*Nset, nset=Roller, instance=SENT-1, generate
   1,  862,   21
*Elset, elset=Roller, instance=SENT-1, generate
   1,  801,   20
*Nset, nset=Top, instance=SENT-1, generate
 862,  882,    1
*Elset, elset=Top, instance=SENT-1, generate
 801,  820,    1
*End Assembly
**
** MATERIALS
**
*Material, name="SENT specimen material"
*Density
7860.,
*Elastic
 2.07e+11, 0.3
*Material, name=Test
*Density
1.,
*Elastic
1.,0.
** ----------------------------------------------------------------
**
** STEP: Step-1
**
*Step, name=Step-1, nlgeom=NO
*Static
0.02, 1., 1e-05, 0.02
**
** BOUNDARY CONDITIONS
**
** Name: Bottom BC Type: Displacement/Rotation
*Boundary
Bottom, 1, 1
Bottom, 2, 2
** Name: Left BC Type: Displacement/Rotation
*Boundary
Roller, 1, 1
** Name: Top BC Type: Velocity/Angular velocity
*Boundary, amplitude=Amp-1, type=VELOCITY
Top, 2, 2, 0.0001
**
** OUTPUT REQUESTS
**
*Restart, write, number interval=1, time marks=NO
**
** FIELD OUTPUT: F-Output-1
**
*Output, field, variable=PRESELECT, number interval=20, time marks=NO
**
** HISTORY OUTPUT: H-Output-1
**
*Output, history, variable=PRESELECT, number interval=200, time marks=NO
**
** HISTORY OUTPUT: H-Output-2
**
*Contour Integral, crack name=H-Output-2_Crack-1, contours=1, crack tip nodes
_PickedSet12, _PickedSet13, 1., 0., 0.
*End Step
