*Heading
** Job name: kink-abaqus Model name: Model-1
** Generated by: Abaqus/CAE 6.14-1
*Preprint, echo=NO, model=NO, history=NO, contact=NO
**
** PARTS
**
*Part, name=Part-1
*End Part
**
**
** ASSEMBLY
**
*Assembly, name=Assembly
**
*Instance, name=Part-1-1, part=Part-1
*Node
      1,  0.200000003,          0.5
      2,  0.200000003,           1.
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*Element, type=CPS4R
1,  1, 17, 20,  4
2, 17, 18, 19, 20
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*Element, type=CPS3
23, 59, 60, 37
24, 37, 52, 59
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*Nset, nset=Set-1, generate
  1,  61,   1
*Elset, elset=Set-1, generate
  1,  50,   1
** Section: Section-1
*Solid Section, elset=Set-1, material=Material-1
,
*End Instance
**
*Nset, nset=Set-1, instance=Part-1-1
  1,  4,  9, 39, 59, 60, 61
*Elset, elset=Set-1, instance=Part-1-1
  1, 22, 23, 37, 49, 50
*Nset, nset=Set-5, instance=Part-1-1
  2,  3,  5,  8, 27, 28, 44
*Elset, elset=Set-5, instance=Part-1-1
  3,  4,  7, 10, 41, 44
*Nset, nset=Set-6, instance=Part-1-1
 10, 11, 13, 16, 30, 31, 45
*Elset, elset=Set-6, instance=Part-1-1
 14, 16, 18, 19, 46, 48
*Nset, nset=Set-7, instance=Part-1-1
 10, 11, 13, 16, 30, 31, 45
*Elset, elset=Set-7, instance=Part-1-1
 14, 16, 18, 19, 46, 48
*Nset, nset=_PickedSet6, internal, instance=Part-1-1
  1,  4,  9, 39, 59, 60, 61
*Elset, elset=_PickedSet6, internal, instance=Part-1-1
  1, 22, 23, 37, 49, 50
*Nset, nset=_PickedSet7, internal, instance=Part-1-1
 9,
*End Assembly
**
** MATERIALS
**
*Material, name=Material-1
*Elastic
1.,0.
** ----------------------------------------------------------------
**
** STEP: Step-1
**
*Step, name=Step-1, nlgeom=NO
*Static
1., 1., 1e-05, 1.
**
** BOUNDARY CONDITIONS
**
** Name: BC-1 Type: Velocity/Angular velocity
*Boundary, type=VELOCITY
Set-5, 2, 2, 0.0001
** Name: BC-2 Type: Displacement/Rotation
*Boundary
Set-7, 1, 1
Set-7, 2, 2
**
** OUTPUT REQUESTS
**
*Restart, write, frequency=0
**
** FIELD OUTPUT: F-Output-1
**
*Output, field, variable=PRESELECT
**
** HISTORY OUTPUT: H-Output-1
**
*Output, history, variable=PRESELECT
**
** HISTORY OUTPUT: H-Output-2
**
*Contour Integral, crack name=H-Output-2_Crack-1, contours=4, crack tip nodes
_PickedSet6, _PickedSet7, 0.707107, -0.707107, 0.
*End Step
