*Heading
** Job name: Miehe-pure-shear Model name: Model-1
** Generated by: Abaqus/CAE 6.14-1
*Preprint, echo=NO, model=NO, history=NO, contact=NO
**
** PARTS
**
*Part, name=Part-1
*Node
      1,           0.,           0.
      2, 0.0500000007,           0.
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*Element, type=CPS4R
  1,   1,   2,  43,  42
  2,   2,   3,  44,  43
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*Nset, nset=Set-5, generate
   1,  902,    1
*Elset, elset=Set-5, generate
   1,  840,    1
*Elset, elset=Cracked, generate
 401,  420,    1
** Section: Section-1
*Solid Section, elset=Set-5, material=Material-1
,
*End Part
**
**
** ASSEMBLY
**
*Assembly, name=Assembly
**
*Instance, name=Part-1-1, part=Part-1
*End Instance
**
*Nset, nset=Bottom, instance=Part-1-1, generate
  1,  41,   1
*Elset, elset=Bottom, instance=Part-1-1, generate
  1,  40,   1
*Nset, nset=Top, instance=Part-1-1, generate
 862,  902,    1
*Elset, elset=Top, instance=Part-1-1, generate
 801,  840,    1
*End Assembly
**
** MATERIALS
**
*Material, name=Material-1
*Density
1.,
*Elastic
1.,0.
** ----------------------------------------------------------------
**
** STEP: Step-1
**
*Step, name=Step-1, nlgeom=YES
*Dynamic, Explicit
, 1.
*Bulk Viscosity
0.06, 1.2
**
** BOUNDARY CONDITIONS
**
** Name: BC-1 Type: Displacement/Rotation
*Boundary
Bottom, 1, 1
Bottom, 2, 2
** Name: BC-2 Type: Velocity/Angular velocity
*Boundary, type=VELOCITY
Top, 1, 1, 0.0001
**
** OUTPUT REQUESTS
**
*Restart, write, number interval=1, time marks=NO
**
** FIELD OUTPUT: F-Output-1
**
*Output, field, variable=PRESELECT
**
** HISTORY OUTPUT: H-Output-1
**
*Output, history, variable=PRESELECT
*End Step
