*Heading
** Job name: XFEM-miehe-pure-shear Model name: Model-1
** Generated by: Abaqus/CAE 6.14-1
*Preprint, echo=NO, model=NO, history=NO, contact=NO
**
** PARTS
**
*Part, name=Part-1
*End Part
**
**
** ASSEMBLY
**
*Assembly, name=Assembly
**
*Instance, name=Part-1-1, part=Part-1
*Node
      1,           1.,           0.
      2,           1.,          0.5
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*Element, type=CPS4R
  1,   1,  10, 226,  81
  2,  10,  11, 227, 226
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*Nset, nset=Set-1, generate
    1,  1377,     1
*Elset, elset=Set-1, generate
    1,  1300,     1
** Section: Section-1
*Solid Section, elset=Set-1, material=Material-1
,
*End Instance
**
*Nset, nset=Set-3, instance=Part-1-1
   1,   4,   9,  58,  59,  60
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*Elset, elset=Set-3, instance=Part-1-1
    1,   14,   27,   40,   53,   66
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*Nset, nset=Set-4, instance=Part-1-1
   5,   6,   8,  94,  95,  96
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*Elset, elset=Set-4, instance=Part-1-1
 338, 351, 364, 377, 390, 403
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*Nset, nset=Set-5, instance=Part-1-1
   1,   4,   5,   6,   8,   9
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*Elset, elset=Set-5, instance=Part-1-1
    1,   14,   27,   40,   53,   66
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*Nset, nset=Set-6, instance=Part-1-1
   1,   4,   9,  58,  59,  60
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*Elset, elset=Set-6, instance=Part-1-1
    1,   14,   27,   40,   53,   66
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*Nset, nset=Set-7, instance=Part-1-1
   5,   6,   8,  94,  95,  96
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*Elset, elset=Set-7, instance=Part-1-1
 338, 351, 364, 377, 390, 403
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*Nset, nset=Set-8, instance=Part-1-1
   5,   6,   8,  94,  95,  96
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*Elset, elset=Set-8, instance=Part-1-1
 338, 351, 364, 377, 390, 403
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*Nset, nset=_PickedSet16, internal, instance=Part-1-1, generate
    1,  1377,     1
*Elset, elset=_PickedSet16, internal, instance=Part-1-1, generate
    1,  1300,     1
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*Enrichment, name=Crack-1, type=PROPAGATION CRACK, elset=_PickedSet16
*End Assembly
**
** MATERIALS
**
*Material, name=Material-1
*Damage Initiation, criterion=MAXPE
 1e-07,
*Damage Evolution, type=DISPLACEMENT
 1e-07,
*Elastic
1.,0.
*Initial Conditions, type=ENRICHMENT
Part-1-1.13, 1,Crack-1, -0.0384615, 0.
Part-1-1.13, 2,Crack-1, 1e-06, 0.
Part-1-1.13, 3,Crack-1, 1e-06, -0.04
Part-1-1.13, 4,Crack-1, -0.0384615, -0.04
Part-1-1.26, 1,Crack-1, -0.0384615
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Part-1-1.325, 4,Crack-1, -0.0384615
**
** BOUNDARY CONDITIONS
**
** Name: BC-1 Type: Displacement/Rotation
*Boundary
Set-6, 1, 1
Set-6, 2, 2
** ----------------------------------------------------------------
**
** STEP: Step-1
**
*Step, name=Step-1, nlgeom=NO, inc=10000
*Static
1., 500., 0.005, 10.
**
** BOUNDARY CONDITIONS
**
** Name: BC-2 Type: Velocity/Angular velocity
*Boundary, type=VELOCITY
Set-8, 1, 1, 0.0001
**
** INTERACTIONS
**
** Interaction: Int-1
*Enrichment Activation, name=Crack-1, activate=ON
**
** OUTPUT REQUESTS
**
*Restart, write, frequency=0
**
** FIELD OUTPUT: F-Output-1
**
*Output, field
*Node Output
CF, PHILSM, PSILSM, RF, U
*Element Output, directions=YES
LE, PE, PEEQ, PEMAG, S, STATUS, STATUSXFEM
*Contact Output
CDISP, CSTRESS
**
** HISTORY OUTPUT: H-Output-1
**
*Output, history, variable=PRESELECT
*End Step
