*Heading
** Job name: Notched-plate-manual Model name: Model-1
** Generated by: Abaqus/CAE 6.14-1
*Preprint, echo=NO, model=NO, history=NO, contact=NO
**
** PARTS
**
*Part, name=Notched-plate
*Node
      1, 0.0949999988,  0.200000003
      2, 0.0949999988,  0.144397005
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*Element, type=CPS4R
  1,   1,  18, 371,  69
  2,  18,  19, 372, 371
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*Nset, nset=Notched-plate-geometry, generate
    1,  1926,     1
*Elset, elset=Notched-plate-geometry, generate
    1,  1824,     1
*Elset, elset=Cracked-elements
 784,
** Section: Plate-section
*Solid Section, elset=Notched-plate-geometry, material=Test
,
*End Part
**
**
** ASSEMBLY
**
*Assembly, name=Assembly
**
*Instance, name=Notched-plate-1, part=Notched-plate
*End Instance
**
*Nset, nset=Bottom, instance=Notched-plate-1
   7,   8,  15,  16, 108, 109
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*Elset, elset=Bottom, instance=Notched-plate-1
  547,  548,  549,  550,  551,  552
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*Elset, elset="Cracked elements", instance=Notched-plate-1, generate
 780,  784,    1
*Nset, nset=Top, instance=Notched-plate-1
   1,   4,  11,  12,  57,  58
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*Elset, elset=Top, instance=Notched-plate-1
    1,   15,   29,   43,   57,   71
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*End Assembly
**
** MATERIALS
**
*Material, name=Test
*Density
1.,
*Elastic
1.,0.
** ----------------------------------------------------------------
**
** STEP: Step-1
**
*Step, name=Step-1, nlgeom=NO
*Dynamic, Explicit
, 1.
*Bulk Viscosity
0.06, 1.2
**
** BOUNDARY CONDITIONS
**
** Name: Bottom-bc Type: Velocity/Angular velocity
*Boundary, type=VELOCITY
Bottom, 2, 2, -0.001
** Name: Top-bc Type: Velocity/Angular velocity
*Boundary, type=VELOCITY
Top, 2, 2, 0.001
**
** OUTPUT REQUESTS
**
*Restart, write, number interval=1, time marks=NO
**
** FIELD OUTPUT: F-Output-1
**
*Output, field, variable=PRESELECT
**
** HISTORY OUTPUT: H-Output-1
**
*Output, history, variable=PRESELECT
*End Step
