*Heading
** Job name: straight_crack_sif Model name: Model-1
** Generated by: Abaqus/CAE 6.14-1
*Preprint, echo=NO, model=NO, history=NO, contact=NO
**
** PARTS
**
*Part, name=Plate
*Node
      1,           0.,           0.
      2, 0.00100000005,           0.
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*Element, type=CPS4R
  1,   1,   2,  12,  11
  2,   2,   3,  13,  12
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*Nset, nset=Set-1, generate
   1,  380,    1
*Elset, elset=Set-1, generate
   1,  333,    1
*Elset, elset=Crack, generate
 163,  165,    1
** Section: Section-1
*Solid Section, elset=Set-1, material=Mat
,
*End Part
**
**
** ASSEMBLY
**
*Assembly, name=Assembly
**
*Instance, name=Plate-1, part=Plate
*End Instance
**
*Nset, nset=Bottom, instance=Plate-1, generate
  1,  10,   1
*Elset, elset=Bottom, instance=Plate-1, generate
 1,  9,  1
*Nset, nset=Left, instance=Plate-1, generate
   1,  371,   10
*Elset, elset=Left, instance=Plate-1, generate
   1,  325,    9
*Nset, nset=Right, instance=Plate-1, generate
  10,  380,   10
*Elset, elset=Right, instance=Plate-1, generate
   9,  333,    9
*Nset, nset=Top, instance=Plate-1, generate
 371,  380,    1
*Elset, elset=Top, instance=Plate-1, generate
 325,  333,    1
*End Assembly
**
** MATERIALS
**
*Material, name=Mat
*Density
8000.,
*Elastic
 2e+11, 0.3
** ----------------------------------------------------------------
**
** STEP: Step-1
**
*Step, name=Step-1, nlgeom=YES
*Dynamic, Explicit
, 0.1
*Bulk Viscosity
0.06, 1.2
**
** BOUNDARY CONDITIONS
**
** Name: BC-1 Type: Displacement/Rotation
*Boundary
Left, 1, 1
** Name: BC-2 Type: Displacement/Rotation
*Boundary
Right, 1, 1
**
** OUTPUT REQUESTS
**
*Restart, write, number interval=1, time marks=NO
**
** FIELD OUTPUT: F-Output-1
**
*Output, field, variable=PRESELECT
**
** HISTORY OUTPUT: H-Output-1
**
*Output, history, variable=PRESELECT
*End Step
